// COMSOL Multiphysics 6.3.0.290 model "multi_pack_dual_motor_pulse_heating.mph"
// 第一版COMSOL多并联电池包-双电机-双控制器脉冲加热模型。固定建成最多三个并联电池包和两套电机控制器支路, 通过pack*_enable、motor*_enable、frequency、duty、phase和pulse_amp_scale参数切换方案。析锂只作为待标定风险标志展示, 不作为自动降额硬限制。当前参数为3806/0528经验占位口径, 仅用于架构粗筛和模型接口验证。
// Outline of the model tree

Parameters
  scenario_id = 1  // 方案编号: 1双支路同步, 2三支路同步, 3单电机单支路, 4双电机集中单支路
  focus_pack_index = 1  // 集中加热目标电池包编号, 当前作为显示和人工切换参考
  pack1_enable = 1  // 电池包1参与标志, 1=参与, 0=断开
  pack2_enable = 1  // 电池包2参与标志, 1=参与, 0=断开
  pack3_enable = 0  // 电池包3参与标志, 1=参与, 0=断开
  motor1_enable = 1  // 电机控制器1参与标志, 1=参与, 0=断开
  motor2_enable = 1  // 电机控制器2参与标志, 1=参与, 0=断开
  N_series_pack = 192  // 单个并联电池包等效串联单体数, 当前为3806占位口径
  C_pack = 324[A*h]  // 单个并联电池包容量, 当前为3806占位口径
  SOC0_pack1 = 0.50  // 电池包1初始SOC
  SOC0_pack2 = 0.50  // 电池包2初始SOC
  SOC0_pack3 = 0.50  // 电池包3初始SOC
  T_init_pack1 = 253.15[K]  // 电池包1初始温度, -20 degC
  T_init_pack2 = 253.15[K]  // 电池包2初始温度, -20 degC
  T_init_pack3 = 253.15[K]  // 电池包3初始温度, -20 degC
  T_amb = 253.15[K]  // 环境温度, -20 degC
  R_pack1 = 0.397[ohm]  // 电池包1低温等效内阻, 占位值
  R_pack2 = 0.397[ohm]  // 电池包2低温等效内阻, 占位值
  R_pack3 = 0.397[ohm]  // 电池包3低温等效内阻, 占位值
  R_pack_off = 1e6[ohm]  // 未参与电池包的等效断开电阻
  R_pack1_eff = R_pack1+R_pack_off*(1-pack1_enable)  // 电池包1开关后的等效串联电阻
  R_pack2_eff = R_pack2+R_pack_off*(1-pack2_enable)  // 电池包2开关后的等效串联电阻
  R_pack3_eff = R_pack3+R_pack_off*(1-pack3_enable)  // 电池包3开关后的等效串联电阻
  Cth_pack1 = 1244e3[J/K]  // 电池包1集总热容, 占位值
  Cth_pack2 = 1244e3[J/K]  // 电池包2集总热容, 占位值
  Cth_pack3 = 1244e3[J/K]  // 电池包3集总热容, 占位值
  A_pack1 = 9[m^2]  // 电池包1换热面积, 占位值
  A_pack2 = 9[m^2]  // 电池包2换热面积, 占位值
  A_pack3 = 9[m^2]  // 电池包3换热面积, 占位值
  h_conv = 8[W/(m^2*K)]  // 电池包对流换热系数
  Rth_pack1 = 1/(h_conv*A_pack1)  // 电池包1到环境等效热阻
  Rth_pack2 = 1/(h_conv*A_pack2)  // 电池包2到环境等效热阻
  Rth_pack3 = 1/(h_conv*A_pack3)  // 电池包3到环境等效热阻
  L_motor1 = 0.26[mH]  // 电机1等效d轴电感, CAM255PT52占位
  L_motor2 = 0.26[mH]  // 电机2等效d轴电感, CAM255PT52占位
  R_motor1 = 0.020[ohm]  // 电机1等效绕组电阻
  R_motor2 = 0.020[ohm]  // 电机2等效绕组电阻
  R_motor_off = 1e6[ohm]  // 未参与电机支路的等效断开电阻
  R_motor1_eff = R_motor1+R_motor_off*(1-motor1_enable)  // 电机1开关后的等效电阻
  R_motor2_eff = R_motor2+R_motor_off*(1-motor2_enable)  // 电机2开关后的等效电阻
  R_ctrl_loss = 0.005[ohm]  // 控制器导通损耗占位电阻
  P_ctrl_switch_ref = 500[W]  // 单控制器开关损耗占位参考
  I_motor_rms_limit = 550[A]  // 单电机/控制器RMS电流参考限制
  I_motor_peak_limit = 778[A]  // 单电机/控制器峰值电流参考限制
  f_pulse = 1250[Hz]  // 默认脉冲频率
  f_pulse_ref = 1250[Hz]  // 控制器损耗参考频率
  duty = 0.50  // 默认占空比
  pulse_amp_scale = 1  // 脉冲电压幅值系数
  phase_m1 = 0  // 电机控制器1相位, 单位为一个周期的比例
  phase_m2 = 0  // 电机控制器2相位, 单位为一个周期的比例
  tr_pulse = 20e-6[s]  // 脉冲上升时间, 第一版用有限斜率避免理想硬切换
  tf_pulse = 20e-6[s]  // 脉冲下降时间, 第一版用有限斜率避免理想硬切换
  V_bus_ref = N_series_pack*3.32[V]  // 50%SOC附近母线参考电压
  Vdrv1_value = 2*V_bus_ref*pulse_amp_scale*motor1_enable  // 控制器1脉冲源幅值
  Vdrv1_offset = -V_bus_ref*pulse_amp_scale*motor1_enable  // 控制器1脉冲源偏置
  Vdrv2_value = 2*V_bus_ref*pulse_amp_scale*motor2_enable  // 控制器2脉冲源幅值
  Vdrv2_offset = -V_bus_ref*pulse_amp_scale*motor2_enable  // 控制器2脉冲源偏置
  cycles_solve = 8  // 默认求解脉冲周期数
  steps_per_cycle = 47  // 每个脉冲周期输出点数, 避免默认输出点正好落在50%占空比翻转边界
  t_end = (cycles_solve-0.05)/f_pulse  // 默认瞬态求解结束时间, 略避开脉冲翻转边界
  dt_out = 1/(f_pulse*steps_per_cycle)  // 默认输出时间步长
  I_pack_rms_ref = 550[A]  // 单电池包RMS电流参考边界, 非硬限制
  I_pack_peak_ref = 778[A]  // 单电池包峰值电流参考边界, 非硬限制
  I_pack_charge_30s_ref = 97.2[A]  // 30s低温回充参考边界, 单个324Ah支路, 非kHz硬限制
  I_pack_discharge_30s_ref = 388.8[A]  // 30s低温放电参考边界, 单个324Ah支路, 非kHz硬限制
  I_plating_risk_ref = 300[A]  // 析锂风险参考电流幅值, 待试验/机理标定, 非硬限制
  V_bus_min_ref = N_series_pack*2.50[V]  // 母线低压参考边界
  V_bus_max_ref = N_series_pack*3.65[V]  // 母线高压参考边界

Variables
  var1 "多电池包双电机脉冲加热变量"
    I_pack1 = cir.Rbat1.i  // 电池包1支路电流
    I_pack1_abs = abs(I_pack1)  // 电池包1支路电流绝对值
    P_pack1_ohmic = cir.Rbat1.i^2*R_pack1  // 电池包1内阻发热
    P_pack1_loss = (lts.T_bat1-T_amb)/Rth_pack1  // 电池包1对流散热
    P_pack1_net = P_pack1_ohmic-P_pack1_loss  // 电池包1净加热功率
    dTdt_pack1 = P_pack1_net/Cth_pack1  // 电池包1温升速率
    T_pack1 = lts.T_bat1  // 电池包1温度
    SOC_pack1 = cir.OCV1.SOC  // 电池包1SOC
    E_ocv_pack1 = cir.OCV1.E_OCV  // 电池包1开路电压
    pack1_peak_ref_over = if(abs(I_pack1)>I_pack_peak_ref,1,0)  // 电池包1峰值电流参考超限标志
    pack1_rms_ref_over = if(abs(I_pack1)>sqrt(2)*I_pack_rms_ref,1,0)  // 电池包1RMS参考边界瞬时等效超限标志
    pack1_charge_30s_ref_over = if(-I_pack1>I_pack_charge_30s_ref,1,0)  // 电池包130s回充参考边界超限标志
    pack1_discharge_30s_ref_over = if(I_pack1>I_pack_discharge_30s_ref,1,0)  // 电池包130s放电参考边界超限标志
    pack1_plating_risk = if(abs(I_pack1)>I_plating_risk_ref,1,0)  // 电池包1析锂风险电流幅值参考标志, 待标定, 非硬限制
    I_pack2 = cir.Rbat2.i  // 电池包2支路电流
    I_pack2_abs = abs(I_pack2)  // 电池包2支路电流绝对值
    P_pack2_ohmic = cir.Rbat2.i^2*R_pack2  // 电池包2内阻发热
    P_pack2_loss = (lts.T_bat2-T_amb)/Rth_pack2  // 电池包2对流散热
    P_pack2_net = P_pack2_ohmic-P_pack2_loss  // 电池包2净加热功率
    dTdt_pack2 = P_pack2_net/Cth_pack2  // 电池包2温升速率
    T_pack2 = lts.T_bat2  // 电池包2温度
    SOC_pack2 = cir.OCV2.SOC  // 电池包2SOC
    E_ocv_pack2 = cir.OCV2.E_OCV  // 电池包2开路电压
    pack2_peak_ref_over = if(abs(I_pack2)>I_pack_peak_ref,1,0)  // 电池包2峰值电流参考超限标志
    pack2_rms_ref_over = if(abs(I_pack2)>sqrt(2)*I_pack_rms_ref,1,0)  // 电池包2RMS参考边界瞬时等效超限标志
    pack2_charge_30s_ref_over = if(-I_pack2>I_pack_charge_30s_ref,1,0)  // 电池包230s回充参考边界超限标志
    pack2_discharge_30s_ref_over = if(I_pack2>I_pack_discharge_30s_ref,1,0)  // 电池包230s放电参考边界超限标志
    pack2_plating_risk = if(abs(I_pack2)>I_plating_risk_ref,1,0)  // 电池包2析锂风险电流幅值参考标志, 待标定, 非硬限制
    I_pack3 = cir.Rbat3.i  // 电池包3支路电流
    I_pack3_abs = abs(I_pack3)  // 电池包3支路电流绝对值
    P_pack3_ohmic = cir.Rbat3.i^2*R_pack3  // 电池包3内阻发热
    P_pack3_loss = (lts.T_bat3-T_amb)/Rth_pack3  // 电池包3对流散热
    P_pack3_net = P_pack3_ohmic-P_pack3_loss  // 电池包3净加热功率
    dTdt_pack3 = P_pack3_net/Cth_pack3  // 电池包3温升速率
    T_pack3 = lts.T_bat3  // 电池包3温度
    SOC_pack3 = cir.OCV3.SOC  // 电池包3SOC
    E_ocv_pack3 = cir.OCV3.E_OCV  // 电池包3开路电压
    pack3_peak_ref_over = if(abs(I_pack3)>I_pack_peak_ref,1,0)  // 电池包3峰值电流参考超限标志
    pack3_rms_ref_over = if(abs(I_pack3)>sqrt(2)*I_pack_rms_ref,1,0)  // 电池包3RMS参考边界瞬时等效超限标志
    pack3_charge_30s_ref_over = if(-I_pack3>I_pack_charge_30s_ref,1,0)  // 电池包330s回充参考边界超限标志
    pack3_discharge_30s_ref_over = if(I_pack3>I_pack_discharge_30s_ref,1,0)  // 电池包330s放电参考边界超限标志
    pack3_plating_risk = if(abs(I_pack3)>I_plating_risk_ref,1,0)  // 电池包3析锂风险电流幅值参考标志, 待标定, 非硬限制
    I_motor1 = cir.Rmot1.i  // 电机控制器1支路电流
    P_motor1_cu = cir.Rmot1.i^2*R_motor1  // 电机1等效铜耗
    P_ctrl1_loss = motor1_enable*(cir.Rmot1.i^2*R_ctrl_loss+P_ctrl_switch_ref*(f_pulse/f_pulse_ref)*abs(cir.Rmot1.i)/(I_motor_rms_limit+1e-12[A]))  // 控制器1损耗占位估算
    motor1_peak_over = if(abs(I_motor1)>I_motor_peak_limit,1,0)  // 电机控制器1峰值电流超限标志
    motor1_rms_ref_over = if(abs(I_motor1)>sqrt(2)*I_motor_rms_limit,1,0)  // 电机控制器1RMS参考边界瞬时等效超限标志
    I_motor2 = cir.Rmot2.i  // 电机控制器2支路电流
    P_motor2_cu = cir.Rmot2.i^2*R_motor2  // 电机2等效铜耗
    P_ctrl2_loss = motor2_enable*(cir.Rmot2.i^2*R_ctrl_loss+P_ctrl_switch_ref*(f_pulse/f_pulse_ref)*abs(cir.Rmot2.i)/(I_motor_rms_limit+1e-12[A]))  // 控制器2损耗占位估算
    motor2_peak_over = if(abs(I_motor2)>I_motor_peak_limit,1,0)  // 电机控制器2峰值电流超限标志
    motor2_rms_ref_over = if(abs(I_motor2)>sqrt(2)*I_motor_rms_limit,1,0)  // 电机控制器2RMS参考边界瞬时等效超限标志
    active_pack_count = pack1_enable+pack2_enable+pack3_enable  // 参与电池包数量
    active_motor_count = motor1_enable+motor2_enable  // 参与电机控制器数量
    I_pack_total = I_pack1+I_pack2+I_pack3  // 三个电池包支路电流代数和
    I_bus_motor = I_motor1+I_motor2  // 两个电机控制器支路电流代数和
    P_bat_total = P_pack1_ohmic+P_pack2_ohmic+P_pack3_ohmic  // 电池总内阻发热
    P_motor_total = P_motor1_cu+P_motor2_cu  // 电机总等效铜耗
    P_ctrl_total = P_ctrl1_loss+P_ctrl2_loss  // 控制器总占位损耗
    P_external_total = P_motor_total+P_ctrl_total  // 电池外部电器损耗
    P_system_loss_total = P_bat_total+P_external_total  // 系统总损耗
    T_pack_avg = (pack1_enable*T_pack1+pack2_enable*T_pack2+pack3_enable*T_pack3)/(active_pack_count+1e-9)  // 参与电池包平均温度
    V_bus_est = (pack1_enable*(E_ocv_pack1-I_pack1*R_pack1)+pack2_enable*(E_ocv_pack2-I_pack2*R_pack2)+pack3_enable*(E_ocv_pack3-I_pack3*R_pack3))/(active_pack_count+1e-9)  // 由电池包端电压估算的母线电压
    focus_pack_current = if(focus_pack_index<1.5,I_pack1,if(focus_pack_index<2.5,I_pack2,I_pack3))  // 集中加热目标电池包电流
    focus_pack_temperature = if(focus_pack_index<1.5,T_pack1,if(focus_pack_index<2.5,T_pack2,T_pack3))  // 集中加热目标电池包温度
    bus_voltage_over = if(V_bus_est<V_bus_min_ref,1,if(V_bus_est>V_bus_max_ref,1,0))  // 母线电压参考越界标志
    safety_risk_count = pack1_peak_ref_over+pack2_peak_ref_over+pack3_peak_ref_over+motor1_peak_over+motor2_peak_over+bus_voltage_over+pack1_plating_risk+pack2_plating_risk+pack3_plating_risk  // 安全风险标志数量, 析锂项为待标定参考

Physics
  lts: LumpedThermalSystem "集总热系统：三电池包独立热节点"
    dependent variable temperatures
    tm1: ThermalMass "电池包1热容"
      Ti = T_init_pack1
      Connections = bat1
      inputType = ThermalCapacitance
      C = Cth_pack1
      includeTemperature = 1
    qsrc1: HeatRateNode "电池包1内阻发热"
      inputType = HeatRate
      P0 = P_pack1_ohmic
      Connections = bat1
      T_init = T_init_pack1
      includeTemperature = 1
    conv1: HeatRateNode "电池包1对流散热"
      inputType = ConvectiveHeatRate
      A = A_pack1
      HeatTransferCoefficientType = UserDef
      h = h_conv
      Text = T_amb
      Connections = bat1
      T_init = T_init_pack1
      includeTemperature = 1
    tm2: ThermalMass "电池包2热容"
      Ti = T_init_pack2
      Connections = bat2
      inputType = ThermalCapacitance
      C = Cth_pack2
      includeTemperature = 1
    qsrc2: HeatRateNode "电池包2内阻发热"
      inputType = HeatRate
      P0 = P_pack2_ohmic
      Connections = bat2
      T_init = T_init_pack2
      includeTemperature = 1
    conv2: HeatRateNode "电池包2对流散热"
      inputType = ConvectiveHeatRate
      A = A_pack2
      HeatTransferCoefficientType = UserDef
      h = h_conv
      Text = T_amb
      Connections = bat2
      T_init = T_init_pack2
      includeTemperature = 1
    tm3: ThermalMass "电池包3热容"
      Ti = T_init_pack3
      Connections = bat3
      inputType = ThermalCapacitance
      C = Cth_pack3
      includeTemperature = 1
    qsrc3: HeatRateNode "电池包3内阻发热"
      inputType = HeatRate
      P0 = P_pack3_ohmic
      Connections = bat3
      T_init = T_init_pack3
      includeTemperature = 1
    conv3: HeatRateNode "电池包3对流散热"
      inputType = ConvectiveHeatRate
      A = A_pack3
      HeatTransferCoefficientType = UserDef
      h = h_conv
      Text = T_amb
      Connections = bat3
      T_init = T_init_pack3
      includeTemperature = 1
  cir: Circuit "电路：三并联电池包-公共母线-双电机控制器"
    dependent variable voltages
    gnd1: GroundNode "DC- / 电路参考地"
    OCV1: BatteryOpenCircuitVoltage "电池包1开路电压"
      Connections = {11, 0}
      Eocv = {610.56[V], 622.08[V], 637.44[V], 656.64[V]}
      SOC_Eocv = {0.1, 0.2, 0.5, 0.9}
      dEocvdT = {0[V/K], 0[V/K]}
      SOC_dEocvdT = {0.1, 0.9}
      Tref = 298.15[K]
      SOC_cell0 = SOC0_pack1
      Q_cell0 = C_pack
      Temp = comp1.lts.T_bat1
    Rbat1: Resistor "电池包1内阻及支路开关" | R = R_pack1_eff; Connections = {11, 100}
    OCV2: BatteryOpenCircuitVoltage "电池包2开路电压"
      Connections = {21, 0}
      Eocv = {610.56[V], 622.08[V], 637.44[V], 656.64[V]}
      SOC_Eocv = {0.1, 0.2, 0.5, 0.9}
      dEocvdT = {0[V/K], 0[V/K]}
      SOC_dEocvdT = {0.1, 0.9}
      Tref = 298.15[K]
      SOC_cell0 = SOC0_pack2
      Q_cell0 = C_pack
      Temp = comp1.lts.T_bat2
    Rbat2: Resistor "电池包2内阻及支路开关" | R = R_pack2_eff; Connections = {21, 100}
    OCV3: BatteryOpenCircuitVoltage "电池包3开路电压"
      Connections = {31, 0}
      Eocv = {610.56[V], 622.08[V], 637.44[V], 656.64[V]}
      SOC_Eocv = {0.1, 0.2, 0.5, 0.9}
      dEocvdT = {0[V/K], 0[V/K]}
      SOC_dEocvdT = {0.1, 0.9}
      Tref = 298.15[K]
      SOC_cell0 = SOC0_pack3
      Q_cell0 = C_pack
      Temp = comp1.lts.T_bat3
    Rbat3: Resistor "电池包3内阻及支路开关" | R = R_pack3_eff; Connections = {31, 100}
    Lmot1: Inductor "电机1等效电感" | L = L_motor1; i = 0[A]; Connections = {100, 211}
    Rmot1: Resistor "电机1等效电阻及支路开关" | R = R_motor1_eff; Connections = {211, 212}
    Vdrv1: VoltageSource "控制器1等效脉冲电压源"
      Connections = {212, 0}
      sourceType = PulseSource
      value = Vdrv1_value
      offset = Vdrv1_offset
      td = phase_m1/f_pulse
      tr = tr_pulse
      tf = tf_pulse
      pw = duty/f_pulse
      Tper = 1/f_pulse
    Lmot2: Inductor "电机2等效电感" | L = L_motor2; i = 0[A]; Connections = {100, 221}
    Rmot2: Resistor "电机2等效电阻及支路开关" | R = R_motor2_eff; Connections = {221, 222}
    Vdrv2: VoltageSource "控制器2等效脉冲电压源"
      Connections = {222, 0}
      sourceType = PulseSource
      value = Vdrv2_value
      offset = Vdrv2_offset
      td = phase_m2/f_pulse
      tr = tr_pulse
      tf = tf_pulse
      pw = duty/f_pulse
      Tper = 1/f_pulse

Studies
  std1 "默认瞬态脉冲加热工况"
    time: Transient "瞬态求解" | tlist = range(0,dt_out,t_end); usertol = on; rtol = 1e-4

Solver configurations
  sol1 "解 1" (study std1)
    v1: Variables "因变量 1"
    t1: Time "瞬态求解器 1"
      dDef: Direct "直接"
      se1: Segregated "分离 1"
        ss1: SegregatedStep "电路：三并联电池包-公共母线-双电机控制器"
        ss2: SegregatedStep "传热"
      d1: Direct "直接，传热变量 (lts)"

Datasets
  dset1: Solution | solution = sol1

Plots
  pg_curr: PlotGroup1D "支路电流与母线电流" | xlabel = 时间 (s); ylabel = 电流 (A)
    glob1: Global "电池包、电机控制器和母线电流"
      expr = {I_pack1, I_pack2, I_pack3, I_motor1, I_motor2, I_bus_motor}
      unit = {A, A, A, A, A, A}
  pg_soc_ocv: PlotGroup1D "SOC 与 OCV" | xlabel = 时间 (s)
    glob1: Global "各电池包SOC与开路电压"
      expr = {SOC_pack1, SOC_pack2, SOC_pack3, E_ocv_pack1, E_ocv_pack2, E_ocv_pack3}
      unit = {1, 1, 1, V, V, V}
  pg_heat: PlotGroup1D "电池温度与发热功率" | xlabel = 时间 (s)
    glob1: Global "温度、温升速率与总发热"
      expr = {T_pack1, T_pack2, T_pack3, T_pack_avg, dTdt_pack1, dTdt_pack2, dTdt_pack3, P_bat_total}
      unit = {degC, degC, degC, degC, K/min, K/min, K/min, W}
  pg_power: PlotGroup1D "功率与能量累计" | xlabel = 时间 (s)
    glob1: Global "电池发热、电机损耗、控制器损耗和能量累计"
      expr = {P_bat_total, P_motor_total, P_ctrl_total, timeint(0,t,P_bat_total), timeint(0,t,P_motor_total), timeint(0,t,P_ctrl_total)}
      unit = {W, W, W, J, J, J}
  pg_limits: PlotGroup1D "电流边界与安全标志" | xlabel = 时间 (s)
    glob1: Global "电机/电池/母线/析锂风险参考标志"
      expr = {motor1_peak_over, motor2_peak_over, pack1_peak_ref_over, pack2_peak_ref_over, pack3_peak_ref_over, bus_voltage_over, pack1_plating_risk, pack2_plating_risk, pack3_plating_risk, safety_risk_count}
      unit = {1, 1, 1, 1, 1, 1, 1, 1, 1, 1}