// COMSOL Multiphysics 6.3.0.290 model "single_branch_pulse_heating_lts_units_ocv_circuit.mph"
// 单支路脉冲加热原型模型。电池采用电路物理场中的开路电压元件表示，串联电池支路内阻、电机等效电感/电阻和控制器等效脉冲电压源。电池温度由集总热系统中的电池支路热容节点求解，内阻发热和对流散热也放在集总热系统内，用于当前阶段的接口打通和数量级验证。
// Outline of the model tree

Parameters
  N_series = 192  // 单支路串联单体数
  C_branch = 324[A*h]  // 单支路容量
  SOC0 = 0.50  // 初始SOC
  T_init = 253.15[K]  // 初始支路温度，-20摄氏度
  T_amb = 253.15[K]  // 环境温度，-20摄氏度
  R_branch = 0.397[ohm]  // 单支路低温内阻
  L_motor = 0.26[mH]  // 电机等效d轴电感
  R_motor = 0.020[ohm]  // 电机等效绕组电阻
  Cth_branch = 1244e3[J/K]  // 电池支路集总热容
  A_branch = 9[m^2]  // 电池支路换热面积
  h_conv = 8[W/(m^2*K)]  // 对流换热系数
  Rth_branch = 1/(h_conv*A_branch)  // 支路到环境等效热阻
  f_pulse = 1250[Hz]  // 默认脉冲频率
  duty = 0.50  // 默认占空比
  cycles_solve = 8  // 接口验证求解周期数
  steps_per_cycle = 40  // 每个脉冲周期输出点数
  Vdrive_amp = 2*N_series*3.32[V]  // 脉冲电压源高低电平幅值
  Vdrive_offset = -N_series*3.32[V]  // 脉冲电压源偏置
  tr_pulse = 1e-6[s]  // 脉冲上升时间
  tf_pulse = 1e-6[s]  // 脉冲下降时间
  I_motor_rms_limit = 550[A]  // 电机/控制器RMS电流参考边界
  I_motor_peak_limit = 778[A]  // 电机/控制器峰值电流参考边界

Variables
  var1 "脉冲加热接口变量"
    I_branch = cir.Rbat.i  // 电池支路电流
    I_motor = cir.Rmot.i  // 电机等效电流
    P_bat_ohmic = cir.Rbat.i^2*R_branch  // 电池支路内阻发热
    P_motor_cu = cir.Rmot.i^2*R_motor  // 电机等效铜耗
    P_heat_loss = (lts.T_bat-T_amb)/Rth_branch  // 支路对流散热功率
    P_net_battery = P_bat_ohmic-P_heat_loss  // 电池净加热功率
    dTdt_branch = P_net_battery/Cth_branch  // 电池温升速率，可按 K/s 或 K/min 显示
    T_branch = lts.T_bat  // 电池支路温度
    SOC_branch = cir.OCV1.SOC  // OCV元件积分得到的支路SOC
    E_ocv_branch = cir.OCV1.E_OCV  // 支路开路电压
    motor_rms_margin_ref = I_motor_rms_limit/(sqrt(cir.Rmot.i^2)+1e-12[A])  // 瞬时电流相对RMS参考边界的比例
    motor_peak_margin_ref = I_motor_peak_limit/(abs(cir.Rmot.i)+1e-12[A])  // 瞬时电流相对峰值参考边界的比例

Physics
  cir: Circuit "电路：OCV电池支路-电机-控制器"
    dependent variable voltages
    gnd1: GroundNode "电路参考地"
    OCV1: BatteryOpenCircuitVoltage "电池支路开路电压"
      Connections = {1, 0}
      Eocv = {610.5600000000001[V], 622.08[V], 637.4399999999999[V], 656.64[V]}
      SOC_Eocv = {0.1, 0.2, 0.5, 0.9}
      dEocvdT = {0[V/K], 0[V/K]}
      SOC_dEocvdT = {0.1, 0.9}
      Tref = 298.15[K]
      SOC_cell0 = SOC0
      Q_cell0 = C_branch
      Temp = comp1.lts.T_bat
    Rbat: Resistor "电池支路内阻" | R = R_branch; Connections = {1, 2}
    Lmot: Inductor "电机等效电感" | L = L_motor; i = 0[A]; Connections = {2, 3}
    Rmot: Resistor "电机等效绕组电阻" | R = R_motor; Connections = {3, 4}
    Vdrv: VoltageSource "控制器等效脉冲电压源"
      Connections = {4, 0}
      sourceType = PulseSource
      value = Vdrive_amp
      offset = Vdrive_offset
      td = 0[s]
      tr = tr_pulse
      tf = tf_pulse
      pw = duty/f_pulse
      Tper = 1/f_pulse
  lts: LumpedThermalSystem "集总热系统：电池支路温升"
    dependent variable temperatures
    tm1: ThermalMass "电池支路热容"
      Ti = T_init
      Connections = bat
      inputType = ThermalCapacitance
      C = Cth_branch
      includeTemperature = 1
    qsrc1: HeatRateNode "电池内阻发热"
      inputType = HeatRate
      P0 = P_bat_ohmic
      Connections = bat
      T_init = T_init
      includeTemperature = 1
    conv1: HeatRateNode "电池支路对流散热"
      inputType = ConvectiveHeatRate
      A = A_branch
      HeatTransferCoefficientType = UserDef
      h = h_conv
      Text = T_amb
      Connections = bat
      T_init = T_init
      includeTemperature = 1

Studies
  std1 "默认瞬态工况"
    time: Transient "瞬态求解" | tlist = range(0,1/(f_pulse*steps_per_cycle),cycles_solve/f_pulse); usertol = on; rtol = 1e-4

Solver configurations
  sol1 "解 1" (study std1)
    v1: Variables "因变量 1"
    t1: Time "瞬态求解器 1"
      dDef: Direct "直接"
      se1: Segregated "分离 1"
        ss1: SegregatedStep "电路：OCV电池支路-电机-控制器"
        ss2: SegregatedStep "传热"
      d1: Direct "直接，传热变量 (lts)"

Datasets
  dset1: Solution | solution = sol1

Plots
  pg_curr: PlotGroup1D "电流与SOC" | xlabel = 时间 (s); ylabel = 电流 / SOC
    glob1: Global "支路电流与SOC" | expr = {I_branch, SOC_branch}; unit = {A, 1}
  pg_heat: PlotGroup1D "电池支路热响应" | xlabel = 时间 (s); ylabel = 温度 / 功率
    glob1: Global "温度与发热功率" | expr = {T_branch, P_bat_ohmic, P_motor_cu, P_heat_loss}; unit = {degC, W, W, W}